*Heading
** Job name: indenter-pl Model name: Model-1
** Generated by: Abaqus/CAE 2020
*Preprint, echo=NO, model=NO, history=NO, contact=NO
**
** PARTS
**
*Part, name=Indenter
*Node
      1,           0.,           0.
      2, 0.0707106814,  0.029289322
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*Element, type=RAX2
 1,  1,  4
 2,  4,  5
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*Node
    100,           0.,  0.100000001,           0.
*Nset, nset=Indenter-RefPt_, internal
100,
*Nset, nset=rp
 100,
*Elset, elset=_contact_SNEG, internal, generate
  1,  98,   1
*Surface, type=ELEMENT, name=contact
_contact_SNEG, SNEG
*Elset, elset=Indenter, generate
  1,  98,   1
*End Part
**
*Part, name=Specimen
*Node
      1,  0.300000012, -0.150000006
      2,  0.300000012,           0.
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*Element, type=CAX4R
  1,    1,    8,  181,  131
  2,    8,    9,  182,  181
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*Element, type=CAX3
904, 1480, 1120, 1134
905, 1171, 1105, 1128
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*Nset, nset=all, generate
    1,  1541,     1
*Elset, elset=all, generate
    1,  1493,     1
*Nset, nset=xsym
   3,   4,   5,  70,  71,  72
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*Elset, elset=xsym
  883,  884,  885,  886,  887,  888
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*Nset, nset=ysym
   5,   6, 139, 140, 141, 142
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*Elset, elset=ysym
  979,  980,  986,  989,  990, 1233
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*Elset, elset=_contact_S2, internal, generate
  21,  903,   21
*Surface, type=ELEMENT, name=contact
_contact_S2, S2
** Section: PET
*Solid Section, elset=all, material=PET
,
*End Part
**
**
** ASSEMBLY
**
*Assembly, name=Assembly
**
*Instance, name=Indenter, part=Indenter
*End Instance
**
*Instance, name=Specimen, part=Specimen
*End Instance
**
*Rigid Body, ref node=Indenter.Indenter-RefPt_, elset=Indenter.Indenter
*End Assembly
**
** MATERIALS
**
*Material, name=PET
*Elastic
3000., 0.35
*Plastic
 30.,0.
630.,1.
**
** INTERACTION PROPERTIES
**
*Surface Interaction, name=int-prop
1.,
*Friction, slip tolerance=0.005
 0.3,
*Surface Behavior, augmented Lagrange
**
** BOUNDARY CONDITIONS
**
** Name: xsym Type: Displacement/Rotation
*Boundary
Specimen.xsym, 1, 1
** Name: ysym Type: Displacement/Rotation
*Boundary
Specimen.ysym, 2, 2
**
** INTERACTIONS
**
** Interaction: contact
*Contact Pair, interaction=int-prop, type=SURFACE TO SURFACE
Specimen.contact, Indenter.contact
** ----------------------------------------------------------------
**
** STEP: load-u
**
*Step, name=load-u, nlgeom=YES, inc=1000
*Static
0.1, 1., 1e-08, 0.1
**
** BOUNDARY CONDITIONS
**
** Name: uy Type: Displacement/Rotation
*Boundary
Indenter.rp, 1, 1
Indenter.rp, 2, 2, -0.1
Indenter.rp, 6, 6
**
** OUTPUT REQUESTS
**
*Restart, write, frequency=0
**
** FIELD OUTPUT: F-Output-1
**
*Output, field, variable=PRESELECT
**
** HISTORY OUTPUT: H-Output-RP
**
*Output, history
*Node Output, nset=Indenter.rp
CF2, RF2, U2
**
** HISTORY OUTPUT: H-Output-1
**
*Output, history, variable=PRESELECT
*End Step
** ----------------------------------------------------------------
**
** STEP: unload
**
*Step, name=unload, nlgeom=YES, inc=1000
*Static
0.1, 1., 1e-08, 0.1
**
** BOUNDARY CONDITIONS
**
** Name: uy Type: Displacement/Rotation
*Boundary
Indenter.rp, 2, 2
**
** OUTPUT REQUESTS
**
*Restart, write, frequency=0
**
** FIELD OUTPUT: F-Output-1
**
*Output, field, variable=PRESELECT
**
** HISTORY OUTPUT: H-Output-RP
**
*Output, history
*Node Output, nset=Indenter.rp
CF2, RF2, U2
**
** HISTORY OUTPUT: H-Output-1
**
*Output, history, variable=PRESELECT
*End Step
